# formic acid production, methyl formate route

Dataset: EcoSpold 2, unit process
Geography: RER
Time period: 1984-01-01 to 2014-12-31
Technology level: current
Classification: EcoSpold01Categories: chemicals/organics
Classification: ISIC rev.4 ecoinvent: 2011:Manufacture of basic chemicals
Synonyms: methanoic acid
Tags: ConvertedDataset
Scenario: Business-as-Usual
System model: Allocation, ecoinvent default
Share of production covered: 100 %
Generated by: personName
Published in: Sutter, J. 2007
Database: ecoinvent
isCopyrightProtected: true
accessRestrictedTo: 1

## General comment
This data represents the production of 1 kg of formic acid
from methyl formate. Raw materials and energy consumptions are modelled with literature
data. The emissions are estimated. Infrastructure is included with a default value.
[This dataset was already contained in the ecoinvent
database version 2. It was not individually updated during the transfer to ecoinvent
version 3. Life Cycle Impact Assessment results may still have changed, as they are
affected by changes in the supply chain, i.e. in other datasets. This dataset was
generated following the ecoinvent quality guidelines for version 2. It may have been
subject to central changes described in the ecoinvent version 3 change report
(http://www.ecoinvent.org/database/ecoinvent-version-3/reports-of-changes/), and the
results of the central updates were reviewed extensively. The changes added e.g.
consistent water flows and other information throughout the database. The documentation
of this dataset can be found in the ecoinvent reports of version 2, which are still
available via the ecoinvent website. The change report linked above covers all central
changes that were made during the conversion process.]

## Included activities start
From the reception of methyl formate at the factory
gate.

## Included activities end
This activity ends with 1 kg of formic acid, 100% af
the factory gate. The dataset includes the input materials, energy uses, infrastructure
and emissions.

## Geography
The inventory is modelled for Europe.

## Technology
The worldwide installed capacity for producing formic acid
was about 330 000 t/a in 1988.
Synthesis of formic acid by hydrolysis of methyl formate is
based on a two-stage process: in the first stage, methanol is carbonylated with carbon
monoxide; in the second stage, methyl formate is hydrolyzed to formic acid and methanol.
The methanol is returned to the first stage.
Although the carbonylation of methanol is relatively
problem-free and has been carried out industrially for a long time, only recently has
the hydrolysis of methyl formate been developed into an economically feasible process.
The main problems are associated with work-up of the hydrolysis mixture. Because of the
unfavorable position of the equilibrium, reesterification of methanol and formic acid to
methyl formate occurs rapidly during the separation of unreacted methyl formate.
Problems also arise in the selection of sufficiently corrosion-resistant materials
Carbonylation of Methanol
In the two processes mentioned, the first stage involves
carbonylation of methanol in the liquid phase with carbon monoxide, in the presence of a
basic catalyst:
As a rule, the catalyst is sodium methoxide. Potassium
methoxide has also been proposed as a catalyst; it is more soluble in methyl formate and
gives a higher reaction rate. Although fairly high pressures were initially preferred,
carbonylation is carried out in new plants at lower pressure. Under these conditions,
reaction temperature and catalyst concentration must be increased to achieve acceptable
conversion. According to published data, ca. 4.5 MPa, 80 °C, and 2.5 wt % sodium
methoxide are employed. About 95 % carbon monoxide, but only about 30 % methanol, is
converted under these circumstances. Nearly quantitative conversion of methanol to
methyl formate can, nevertheless, be achieved by recycling the unreacted methanol. The
carbonylation of methanol is an equilibrium reaction. The reaction rate can be raised by
increasing the temperature, the carbon monoxide partial pressure, the catalyst
concentration, and the interface between gas and liquid.
To synthesize methyl formate, gas mixtures with a low
proportion of carbon monoxide must first be concentrated. In a side reaction, sodium
methoxide reacts with methyl formate to form sodium formate and dimethyl ether, and
becomes inactivated. The substances used must be anhydrous; otherwise, sodium formate is
precipitated to an increasing extent. Sodium formate is considerably less soluble in
methyl formate than in methanol. The risk of encrustation and blockage due to
precipitation of sodium formate can be reduced by adding poly(ethylene glycol). The
carbon monoxide used must contain only a small amount of carbon dioxide; otherwise, the
catalytically inactive carbonate is precipitated.
Basic catalysts may reverse the reaction, and methyl formate decomposes into methanol
and carbon monoxide. Therefore, undecomposed sodium methoxide in the methyl formate must
be neutralized.
Hydrolysis of Methyl Formate
In the second stage, the methyl formate obtained is
hydrolyzed:
The equilibrium constant for methyl formate hydrolysis
depends on the water: ester ratio. With a molar ratio of 1, the constant is 0.14, but
with a water: methyl formate molar ratio of 15, it is 0.24. Because of the unfavorable
position of this equilibrium, a large excess of either water or methyl formate must be
used to obtain an economically worthwhile methyl formate conversion. If methyl formate
and water are used in a molar ratio of 1 : 1, the conversion is only 30 %, but if the
molar ratio of water to methyl formate is increased to 5 – 6, the conversion of methyl
formate rises to 60 %. However, a dilute aqueous solution of formic acid is obtained
this way, and excess water must be removed from the formic acid with the expenditure of
as little energy as possible.
Another way to overcome the unfavorable position of the
equilibrium is to hydrolyze methyl formate in the presence of a tertiary amine, e.g.,
1-(n-pentyl)imidazole. The base forms a salt-like compound with formic acid; therefore,
the concentration of free formic acid decreases and the hydrolysis equilibrium is
shifted in the direction of products. In a subsequent step formic acid can be distilled
from the base without decomposition.
A two-stage hydrolysis has been suggested, in which a
water-soluble formamide is used in the second stage; this forms a salt-like compound
with formic acid. It also shifts the equilibrium in the direction of formic acid.
To keep undesirable reesterification as low as possible,
the time of direct contact between methanol and formic acid must be as short as
possible, and separation must be carried out at the lowest possible temperature.
Introduction of methyl formate into the lower part of the column in which lower boiling
methyl formate and methanol are separated from water and formic acid, has also been
suggested. This largely prevents reesterification because of the excess methyl formate
present in the critical region of the column.
Dehydration of the Hydrolysis Mixture
Formic acid is marketed in concentrations exceeding 85 wt
%; therefore, dehydration of the hydrolysis mixture is an important step in the
production of formic acid from methyl formate. For dehydration, the azeotropic point
must be overcome. The concentration of formic acid in the azeotropic mixture increases
if distillation is carried out under pressure, but the higher boiling point at high
pressure also increases the decomposition rate of formic acid. At the same time, the
selection of sufficiently corrosion-resistant materials presents considerable problems.
A number of entrainers have been proposed for azeotropic distillation.
Reference:
Gräfje, H., Körnig, W., Weitz, H.-M., Reiß, W.:
Butanediols, Butenediol, and Butynediol, Chapter 1. In: Ullmann's Encyclopedia of
Industrial Chemistry, Sev-enth Edition, 2004 Electronic Release (ed. Fiedler E.,
Grossmann G., Kersebohm D., Weiss G. and Witte C.). 7 th Electronic Release Edition.
WileyInterScience, New York, Online-Version under:
http://www.mrw.interscience.wiley.com/ueic/articles/a04_455/frame.html

## Time period
Time of publications

## Parameters
- fraction, cooling water, recirculating system, to air: 0.771; name fraction_CW_R_to_air; lognormal variance with pedigree 0.0413, pedigree (2,3,1,3,1)
  Calculated based on literature value (Scown, C.D., 2011, Water
  Footprint of U.S. Transportation Fuels and supplying information of the article) (Vionnet,
  S., Quantis Water Database - Technical Report, 2012).
- fraction, water, deionised, to air: 0.205; name fraction_WDI_to_air; = fraction_PW_to_air; lognormal variance with pedigree 0.092025, pedigree (4,4,3,2,4)
  Calculated value. See comment in the other parametres present in this
  dataset. Deionised water is considered to be always used as process water, thus process
  water fractions to air are applied to all deionised water input flows to calculate the
  amount of water consumed in the processes.
- fraction, process water, to air: 0.205 dimensionless; name fraction_PW_to_air; lognormal variance with pedigree 0.092025, pedigree (4,4,3,2,4)
  Literature value (Statistics Canada, 2007 & Shaffer, K.H., 2008,
  Consumptive water use in the Great Lakes Basin, USGS) (Vionnet, S., Quantis Water Database
  - Technical Report, 2012).
- fraction, cooling water, cooling pond system, to air: 0.032; name fraction_CW_CP_to_air; lognormal variance with pedigree 0.0413, pedigree (2,3,1,3,1)
  (same comment as for fraction, cooling water, recirculating system, to air)
- fraction, cooling water, once-through system, to air: 0.004; name fraction_CW_OT_to_air; lognormal variance with pedigree 0.0413, pedigree (2,3,1,3,1)
  (same comment as for fraction, cooling water, recirculating system, to air)
- fraction, cooling water, to air: 0.3875; name fraction_CW_to_air; = (0.5*fraction_CW_OT_to_air)+(0.5*fraction_CW_R_to_air); lognormal variance with pedigree 0.092025, pedigree (4,4,3,2,4)
  Calculated value based on literature value (see comments of the other
  parametres present in this dataset) and expert opinion. In the case when no
  industry/literature data are available about the type of cooling or directly fraction,
  cooling water, to air specific for the process a default assumption is applied. It is
  assumed that the once-through cooling system is used in 50% of all cases and recirculating
  system is used in another 50% of all cases.

## Reference product
- formic acid: 1 kg; By-product classification allocatable product; CAS 64-18-6
  Formic acid is a colorless liquid with a pungent odor, which is
  completely miscible with water and many polar solvents but only partially miscible with
  hydrocarbons. Formic acid has been detected in the poison or defense systems of ants,
  bees, and other insects and also of cnidarians.
  Formic acid is used primarily in dyeing, in the textile and leather industries; in rubber
  production; and as an intermediate in the chemical and pharmaceutical industries. The use
  of formic acid as an aid in the ensilage of green forage has increased sharply.
  The worldwide production of formic acid is about 260 000 t/a in 1987 and 390 000 t/a in
  1995.
  EcoSpold01Location=RER
  production volume 2.56e8 kg
    unknown
    //Comment added during dataset update://
    Calculated with 80% capacity utilisation from 320 million kg European capacity according
    to http://www.dfcinternational.com/files/DuniaFormicAcidSurvey15June2008.pdf
  property price 0.404 EUR2005
    Temporary price data. Calculated as 90% of purchasers price based
    on: 2004 import and export prices (total trades (USD) divided by total weight (kg) in
    EU27, USA, China, Japan and India) from UN Commodity Trade Statistics Database
    (http://data.un.org/Explorer.aspxDatabase [Accessed 2 July 2010]). Commodity: Formic
    acid
  property carbon content 0.4
    carbon content on a dry matter basis (reserved; not for manual
    entry)
  properties: carbon content, fossil 0.4, water content 0, water in wet mass 0 kg, wet mass 1 kg, carbon content, non-fossil 0, dry mass 1 kg, carbon allocation 0.4 kg

## Inputs from technosphere
- water, deionised, from tap water, at user: 0.6 kg; name water_deionised_input; lognormal variance with pedigree 0.0707, pedigree (1,3,5,3,1)
  EcoSpold01Location=CH
  Literature value.
  Uncertainty: Herman 1984
  properties: wet mass 1 kg
- heat, district or industrial, natural gas: 0 MJ; normal variance with pedigree 0, pedigree (1,1,1,1,1)
  Literature value.
  Uncertainty: Mc Ketta 1985
- chemical factory, organics: 4e-10 unit; lognormal variance with pedigree 0.448, pedigree (4,5,5,5,5)
  EcoSpold01Location=RER
  Estimation. This module assumes a built area of about 4.2 ha, an
  average output of 50'000 t/a, and plant life of fifty years.
  Uncertainty: Estimation
- carbon monoxide: 0.6144 kg; lognormal variance with pedigree 0.0707, pedigree (1,3,5,3,1)
  Literature value.
  EcoSpold01Location=RER
  Uncertainty: Mc Ketta 1985
  properties: dry mass 1 kg, wet mass 1 kg, carbon content, fossil 0.428571
  note on carbon content, fossil: CO. It is assumed that CO is produced from partial combustion of heavy heating oil.
- electricity, medium voltage: 0 kWh; normal variance with pedigree 0, pedigree (1,1,1,1,1)
  Literature value.
  EcoSpold01Location=UCTE
  Uncertainty: Mc Ketta 1985
- heat, district or industrial, other than natural gas: 0 MJ; normal variance with pedigree 0, pedigree (1,1,1,1,1)
  Literature value.
  Uncertainty: Mc Ketta 1985
- methanol: 0.04 kg; lognormal variance with pedigree 0.0707, pedigree (1,3,5,3,1)
  EcoSpold01Location=GLO
  Literature value.
  Uncertainty: Mc Ketta 1985
  properties: dry mass 1 kg, carbon content, fossil 0.375, wet mass 1 kg
- heat, district or industrial, natural gas: 14.5212, 0.108806 MJ (2 entries); lognormal variance with pedigree 0.0707, pedigree (1,3,5,3,1)
  Literature value.
  Uncertainty: Mc Ketta 1985
- electricity, medium voltage: 0.0021866, 0.000753744, 0.0111605, 0.0022578, 0.00524915, 0.0464081, 0.00269255, 0.0115484, 0.0230577, 0.0100155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 kWh (29 entries); lognormal variance with pedigree 0.0707, pedigree (1,3,5,3,1)
  Literature value.
  EcoSpold01Location=UCTE
  Uncertainty: Mc Ketta 1985
- heat, district or industrial, other than natural gas: 8.03082, 0.135028 MJ (2 entries); lognormal variance with pedigree 0.0707, pedigree (1,3,5,3,1)
  Literature value.
  Uncertainty: Mc Ketta 1985

## Inputs from nature
- Water, cooling, unspecified natural origin [natural resource, in water]: 0.3755 m3; name water_cooling_UNO_input; lognormal variance with pedigree 0.0707, pedigree (1,3,5,3,1)
  Literature value.
  Uncertainty: Mc Ketta 1985

## Emissions to nature
- BOD5, Biological Oxygen Demand [water, surface water]: 0.0011 kg; lognormal variance with pedigree 0.188, pedigree (4,5,5,5,5)
  Calculation. This value was calculated from the amount of methyl
  formate in the treated waste water assuming a carbon conversion of 96% for COD. The worst
  case scenario, BOD=COD, was used.
  It is assumed that the manufacturing plant is located in an urban/industrial area and
  consequently the emissions are categorised as emanating in a high population density area.
  The emissions into water are assumed to be emitted into rivers.
  Uncertainty: Calculated from the water emissions
- COD, Chemical Oxygen Demand [water, surface water]: 0.0011 kg; lognormal variance with pedigree 0.188, pedigree (4,5,5,5,5)
  Calculation. This data was calculated from the amount of methyl
  formate in the treated waste water assuming a carbon conversion of 96% for COD. The worst
  case scenario BOD=COD was used.
  It is assumed that the manufacturing plants are located in an urban/industrial area and
  consequently the emissions are categorised as emanating in a high population density area.
  Water emissions are assumed to be emitted into rivers.
  Uncertainty: Calculated from the water emissions
- TOC, Total Organic Carbon [water, surface water]: 0.00042 kg; lognormal variance with pedigree 0.188, pedigree (4,5,5,5,5)
  Calculation. This data was calculated from the amount of methyl
  formate in the treated waste water assuming a carbon conversion of 96% for COD. The worst
  case scenario TOC=DOC was used.
  It is assumed that the manufacturing plants are located in an urban/industrial area and
  consequently the emissions are categorised as emanating in a high population density area.
  Water emissions are assumed to be emitted into rivers.
  Uncertainty: Calculated from the water emissions
- Carbon dioxide, fossil [air, urban air close to ground]: 0.013913 kg; lognormal variance with pedigree 0.02, pedigree (4,5,5,5,5)
  Estimation. The carbon contained in the removed methyl formate during
  waste water treatment was accounted for as CO2 emissions to air.
  Air emissions occurring from the purge vent, the distillation vent and fugitive emission
  sources were estimated to 0.2% of the raw material input.
  It is assumed that the manufacturing plants are located in an urban/industrial area and
  consequently the emissions are categorised as emanating in a high population density area.
  Uncertainty: Calculated from the water treatment
- Water [water, unspecified]: 0.230471 m3; name water_to_water_unspecified; = (water_deionised_input/1000)*(1-fraction_WDI_to_air)+water_cooling_UNO_input*(1-fraction_CW_to_air); lognormal variance with pedigree 0.0487, pedigree (2,2,4,1,1)
  Calculated value based on literature values and expert opinion. See
  comments in the parametres' comment field.
  property fraction, origin: unspecified 0.99793; name fraction_origin_unspecified_Ww
  property fraction, origin: salt water 0; name fraction_origin_salt_water_Ww
  property fraction, origin: fresh water 0.00206968; name fraction_origin_fresh_water_Ww
  property wet mass 1000 kg; name WM
  property carbon content, non-fossil 0; name C_content_non_fossil
  property water in wet mass 1000 kg; name WWM
  property dry mass 0 kg; name DM
  property carbon content, fossil 0; name C_content_fossil
- Methyl formate [water, surface water]: 0.001054 kg; lognormal variance with pedigree 0.02, pedigree (4,5,5,5,5)
  Estimation. The water emissions were estimated to 0.8% of the
  intermediate methyl formate. The carbon contained in the removed methyl formate during
  waste water treatment was accounted for as CO2 emissions to air.
  It is assumed that the manufacturing plants are located in an urban/industrial area and
  consequently the emissions are categorised as emanating in a high population density area.
  Water emissions are assumed to be emitted into rivers.
  Uncertainty: Estimation
- Carbon monoxide, fossil [air, urban air close to ground]: 0.006144 kg; lognormal variance with pedigree 0.798, pedigree (4,5,5,5,5)
  Estimation. Air emissions occurring from the purge vent, the
  distillation vent and fugitive emission sources were estimated to 0.2% of the raw material
  input.
  It is assumed that the manufacturing plants are located in an urban/industrial area and
  consequently the emissions are categorised as emanating in a high population density area.
  Uncertainty: Estimation
- Water [air, unspecified]: 0.145629 m3; name water_to_air_unspecified; = (water_deionised_input/1000*fraction_WDI_to_air)+(water_cooling_UNO_input*fraction_CW_to_air); lognormal variance with pedigree 0.0487, pedigree (2,2,4,1,1)
  (same comment as for Water)
  property fraction, origin: unspecified 0.999155; name fraction_origin_unspecified
  property fraction, origin: fresh water 0.000844611; name fraction_origin_fresh_water
  property fraction, origin: salt water 0; name fraction_origin_salt_water
- Methyl formate [air, urban air close to ground]: 0.00264 kg; lognormal variance with pedigree 0.02, pedigree (4,5,5,5,5)
  (same comment as for Carbon monoxide, fossil)
- DOC, Dissolved Organic Carbon [water, surface water]: 0.00042 kg; lognormal variance with pedigree 0.188, pedigree (4,5,5,5,5)
  (same comment as for TOC, Total Organic Carbon)

## Sampling procedure
Literature data

## Extrapolations
This dataset has been extrapolated from year 2006 to the year
of the calculation (2014). The uncertainty has been adjusted accordingly.
