# compost plant, open

Dataset: EcoSpold 1, unit process, infrastructure
Functional unit: 1 unit
Category: agricultural means of production / buildings
Geography: CH
Time period: 1999 to 1999
Formula: 0
Synonyms: 0
Generated by: Angelika Heil
copyright: true
accessRestrictedTo: 0

## General comment
The inventory refers to a compost plant over the lifetime of 25 years. The compost plant is constructed for a treating capactiy of 10‘000 tons biogenic waste per year. The total turnover of the plant over the entire lifetime of 25 years amounts thus 250‘000 tons biogenic waste.

## Included processes
Building materials required for a compost plant and its construction as well as the disposal of these materials were included. Land use during construction and use is considered. The lifetime of the plant was assumed as 25 years. Transport of the building materials to the construction site were included.

## Geography
Values refer to the situtation in Switzerland.

## Technology
Refer to open plant composting.

## Time period
Year when reference used for this inventory was published.

## Reference product
- compost plant, open [CH]: 1 unit

## Inputs from technosphere
- gravel, crushed, at mine [CH]: 2.16e7 kg; lognormal SD95 1.22
  (2,3,1,1,1,5)
- sand, at mine [CH]: 1.17e6 kg; lognormal SD95 1.22
  (2,3,1,1,1,5)
- concrete, sole plate and foundation, at plant [CH]: 367 m3; lognormal SD95 1.22
  (2,3,1,1,1,5)
- cast iron, at plant [RER]: 50000 kg; lognormal SD95 1.22
  (2,3,1,1,1,5)
- copper, at regional storage [RER]: 375 kg; lognormal SD95 1.22
  (2,3,1,1,1,5)
- reinforcing steel, at plant [RER]: 21200 kg; lognormal SD95 1.22
  (2,3,1,1,1,5)
- steel, low-alloyed, at plant [RER]: 37500 kg; lognormal SD95 1.22
  (2,3,1,1,1,5)
- bitumen, at refinery [CH]: 122000 kg; lognormal SD95 1.22
  (2,3,1,1,1,5)
- transport, lorry 28t [CH]: 484000 tkm; lognormal SD95 2.09
  (4,5,na,na,na,na)
- transport, freight, rail [CH]: 71600 tkm; lognormal SD95 2.09
  (4,5,na,na,na,na)
- disposal, building, waste wood, chrome preserved, to final disposal [CH]: 125000 kg; lognormal SD95 1.22
  (2,3,1,1,1,5)
- disposal, inert waste, 5% water, to inert material landfill [CH]: 2.16e7 kg; lognormal SD95 1.22
  (2,3,1,1,1,5)
- disposal, building, concrete, not reinforced, to sorting plant [CH]: 807000 kg; lognormal SD95 1.22
  (2,3,1,1,1,5)
- disposal, building, reinforcement steel, to recycling [CH]: 21200 kg; lognormal SD95 1.22
  (2,3,1,1,1,5)
- glued laminated timber, outdoor use, at plant [RER]: 278 m3; lognormal SD95 1.22
  (2,3,1,1,1,5)

## Inputs from nature
- Occupation, construction site [resource, land]: 750 m2a; lognormal SD95 1.57
  (2,3,1,1,1,5)
- Occupation, industrial area, built up [resource, land]: 18800 m2a; lognormal SD95 1.57
  (2,3,1,1,1,5)
- Transformation, from unknown [resource, land]: 750 m2; lognormal SD95 2.05
  (2,3,1,1,1,5)
- Transformation, to industrial area, built up [resource, land]: 750 m2; lognormal SD95 2.05
  (2,3,1,1,1,5)

## Sampling procedure
Data come from one compost plant in Switzerland.

## Sources
- Nemecek, T., Heil A., Huguenin, O., Meier, S., Erzinger S., Blaser S., Dux. D., Zimmermann A.,, 2003, Life Cycle Inventories of Agricultural Production Systems, Final report ecoinvent 2000, 15, Swiss Centre for LCI, FAL & FAT, Dübendorf, CH

## Validation
Passed.
