# label housing system, pig

Dataset: EcoSpold 1, unit process, infrastructure
Functional unit: 1 pig place
Category: agricultural means of production / buildings
Geography: CH
Time period: 1994 to 2002
Synonyms: 0
Generated by: Dunja Dux
copyright: true
accessRestrictedTo: 0

## General comment
The module includes a pen for fattening pigs with animal-friendly housing system with multispace pens and exercise area, fittings, slurry store, concentrate silo, wet mix feeding system and straw storage area. Size: 300 pig places. Lifetime of the building is 50 years.

## Included processes
The inventory takes into account the use of construction materials and building machines for construction, repair and replacement including waste disposal and the transportation of the materials to the building site. Not taken into account were direct emission of the construction, disposal of production waste and the use of resources during utilization phase.

## Geography
The inventory applies for Swiss agricultural buildings only, because of the solid method of construction.

## Technology
The data of the inventory are based on one example of a typical agricultural building.

## Reference product
- label housing system, pig [CH]: 1 pig place

## Inputs from technosphere
- gravel, round, at mine [CH]: 493 kg; lognormal SD95 1.05
  (1,2,1,1,1,na)
- portland cement, strength class Z 42.5, at plant [CH]: 14.8 kg; lognormal SD95 1.05
  (1,2,1,1,1,na)
- brick, at plant [RER]: 230 kg; lognormal SD95 1.05
  (1,2,1,1,1,na)
- concrete, normal, at plant [CH]: 1.42 m3; lognormal SD95 1.05
  (1,2,1,1,1,na)
- poor concrete, at plant [CH]: 0.13 m3; lognormal SD95 1.05
  (1,2,1,1,1,na)
- fibre cement corrugated slab, at plant [CH]: 9.35 kg; lognormal SD95 1.05
  (1,2,1,1,1,na)
- fibre cement facing tile, at plant [CH]: 53.3 kg; lognormal SD95 1.05
  (1,2,1,1,1,na)
- cement mortar, at plant [CH]: 57.8 kg; lognormal SD95 1.05
  (1,2,1,1,1,na)
- excavation, hydraulic digger [RER]: 6.26 m3; lognormal SD95 1.05
  (1,2,1,1,1,na)
- excavation, skid-steer loader [RER]: 3.44 m3; lognormal SD95 1.05
  (1,2,1,1,1,na)
- electricity, low voltage, at grid [CH]: 6.25 kWh; lognormal SD95 1.05
  (1,2,1,1,1,na)
- flat glass, uncoated, at plant [RER]: 1.32 kg; lognormal SD95 1.05
  (1,2,1,1,1,na)
- polystyrene foam slab, at plant [RER]: 0.445 kg; lognormal SD95 1.05
  (1,2,1,1,1,na)
- rock wool, at plant [CH]: 1.03 kg; lognormal SD95 1.05
  (1,2,1,1,1,na)
- aluminium, production mix, at plant [RER]: 1.28 kg; lognormal SD95 1.05
  (1,2,1,1,1,na)
- cast iron, at plant [RER]: 32.9 kg; lognormal SD95 1.05
  (1,2,1,1,1,na)
- chromium steel 18/8, at plant [RER]: 57.8 kg; lognormal SD95 1.05
  (1,2,1,1,1,na)
- copper, at regional storage [RER]: 2.79 kg; lognormal SD95 1.05
  (1,2,1,1,1,na)
- reinforcing steel, at plant [RER]: 78.4 kg; lognormal SD95 1.05
  (1,2,1,1,1,na)
- steel, low-alloyed, at plant [RER]: 7.87 kg; lognormal SD95 1.05
  (1,2,1,1,1,na)
- sheet rolling, steel [RER]: 7.87 kg; lognormal SD95 1.05
  (1,2,1,1,1,na)
- zinc coating, coils [RER]: 1.67 m2; lognormal SD95 1.05
  (1,2,1,1,1,na)
- zinc coating, pieces [RER]: 1.74 m2; lognormal SD95 1.05
  (1,2,1,1,1,na)
- bitumen, at refinery [CH]: 0.478 kg; lognormal SD95 1.05
  (1,2,1,1,1,na)
- kraft paper, unbleached, at plant [RER]: 25.8 kg; lognormal SD95 1.05
  (1,2,1,1,1,na)
- epoxy resin, liquid, at plant [RER]: 18.7 kg; lognormal SD95 1.05
  (1,2,1,1,1,na)
- polyethylene, HDPE, granulate, at plant [RER]: 0.507 kg; lognormal SD95 1.05
  (1,2,1,1,1,na)
- polypropylene, granulate, at plant [RER]: 0.0322 kg; lognormal SD95 1.05
  (1,2,1,1,1,na)
- polyurethane, rigid foam, at plant [RER]: 0.088 kg; lognormal SD95 1.05
  (1,2,1,1,1,na)
- polyvinylchloride, bulk polymerised, at plant [RER]: 0.647 kg; lognormal SD95 1.05
  (1,2,1,1,1,na)
- extrusion, plastic film [RER]: 1.19 kg; lognormal SD95 1.05
  (1,2,1,1,1,na)
- transport, lorry 28t [CH]: 233 tkm; lognormal SD95 2
  (1,2,1,1,1,na)
- disposal, building, bitumen sheet, to final disposal [CH]: 0.478 kg; lognormal SD95 1.05
  (1,2,1,1,1,na)
- disposal, building, brick, to final disposal [CH]: 292 kg; lognormal SD95 1.05
  (1,2,1,1,1,na)
- disposal, building, bulk iron (excluding reinforcement), to sorting plant [CH]: 103 kg; lognormal SD95 1.05
  (1,2,1,1,1,na)
- disposal, building, cement (in concrete) and mortar, to final disposal [CH]: 69.8 kg; lognormal SD95 1.05
  (1,2,1,1,1,na)
- disposal, building, concrete, not reinforced, to final disposal [CH]: 286 kg; lognormal SD95 1.05
  (1,2,1,1,1,na)
- disposal, building, glass sheet, to final disposal [CH]: 1.32 kg; lognormal SD95 1.05
  (1,2,1,1,1,na)
- disposal, building, mineral wool, to final disposal [CH]: 1.03 kg; lognormal SD95 1.05
  (1,2,1,1,1,na)
- disposal, building, polyethylene/polypropylene products, to final disposal [CH]: 45.1 kg; lognormal SD95 1.05
  (1,2,1,1,1,na)
- disposal, building, polystyrene isolation, flame-retardant, to final disposal [CH]: 3.35 kg; lognormal SD95 1.05
  (1,2,1,1,1,na)
- disposal, building, polyurethane foam, to final disposal [CH]: 0.088 kg; lognormal SD95 1.05
  (1,2,1,1,1,na)
- disposal, building, polyvinylchloride products, to final disposal [CH]: 0.647 kg; lognormal SD95 1.05
  (1,2,1,1,1,na)
- disposal, building, reinforced concrete, to final disposal [CH]: 3210 kg; lognormal SD95 1.05
  (1,2,1,1,1,na)
- disposal, building, waste wood, untreated, to final disposal [CH]: 151 kg; lognormal SD95 1.05
  (1,2,1,1,1,na)
- glued laminated timber, indoor use, at plant [RER]: 0.009 m3; lognormal SD95 1.05
  (1,2,1,1,1,na)
- sawn timber, softwood, planed, air dried, at plant [RER]: 0.293 m3; lognormal SD95 1.05
  (1,2,1,1,1,na)

## Inputs from nature
- Occupation, construction site [resource, land]: 7.56 m2a; lognormal SD95 1.5
  (1,2,1,1,1,na)
- Occupation, urban, discontinuously built [resource, land]: 189 m2a; lognormal SD95 1.5
  (1,2,1,1,1,na)
- Transformation, from pasture and meadow [resource, land]: 3.78 m2; lognormal SD95 2
  (1,2,1,1,1,na)
- Transformation, to urban, discontinuously built [resource, land]: 3.78 m2; lognormal SD95 2
  (1,2,1,1,1,na)

## Emissions to nature
- Heat, waste [air, low population density]: 22.5 MJ; lognormal SD95 1.05
  (1,2,1,1,1,na)

## Sampling procedure
The inventory is calculated based on a solid database of agricultural buildings.

## Sources
- Nemecek, T., Heil A., Huguenin, O., Meier, S., Erzinger S., Blaser S., Dux. D., Zimmermann A.,, 2003, Life Cycle Inventories of Agricultural Production Systems, Final report ecoinvent 2000, 15, Swiss Centre for LCI, FAL & FAT, Dübendorf, CH

## Validation
Passed.
