# tower silo, plastic

Dataset: EcoSpold 1, unit process, infrastructure
Functional unit: 1 m3
Category: agricultural means of production / buildings
Geography: CH
Time period: 1994 to 2002
Synonyms: 0
Generated by: Dunja Dux
copyright: true
accessRestrictedTo: 0

## General comment
The module includes a foundation made of concrete and a tower silo made of glass fibre reinforced polyester. Size: 105 m3. Lifetime of the building is 25 years.

## Included processes
The inventory takes into account the use of construction materials and building machines for construction, repair and replacement including waste disposal and the transportation of the materials to the building site. Not taken into account were direct emission of the construction, disposal of production waste and the use of resources during utilization phase.

## Geography
The inventory applies for Swiss agricultural buildings only, because of the solid method of construction.

## Technology
The data of the inventory are based on one example of a typical agricultural building.

## Reference product
- tower silo, plastic [CH]: 1 m3

## Inputs from technosphere
- gravel, round, at mine [CH]: 46.3 kg; lognormal SD95 1.05
  (1,2,1,1,1,na)
- portland cement, strength class Z 42.5, at plant [CH]: 11.2 kg; lognormal SD95 1.05
  (1,2,1,1,1,na)
- concrete, normal, at plant [CH]: 0.0743 m3; lognormal SD95 1.05
  (1,2,1,1,1,na)
- poor concrete, at plant [CH]: 0.00597 m3; lognormal SD95 1.05
  (1,2,1,1,1,na)
- excavation, hydraulic digger [RER]: 0.118 m3; lognormal SD95 1.05
  (1,2,1,1,1,na)
- electricity, low voltage, at grid [CH]: 0.461 kWh; lognormal SD95 1.05
  (1,2,1,1,1,na)
- glass fibre, at plant [RER]: 13.7 kg; lognormal SD95 1.05
  (1,2,1,1,1,na)
- cast iron, at plant [RER]: 2.58 kg; lognormal SD95 1.05
  (1,2,1,1,1,na)
- reinforcing steel, at plant [RER]: 2.61 kg; lognormal SD95 1.05
  (1,2,1,1,1,na)
- zinc coating, pieces [RER]: 0.148 m2; lognormal SD95 1.05
  (1,2,1,1,1,na)
- glass fibre reinforced plastic, polyester resin, hand lay-up, at plant [RER]: 9.12 kg; lognormal SD95 1.05
  (1,2,1,1,1,na)
- transport, lorry 28t [CH]: 13.1 tkm; lognormal SD95 2
  (1,2,1,1,1,na)
- disposal, building, bulk iron (excluding reinforcement), to sorting plant [CH]: 2.72 kg; lognormal SD95 1.05
  (1,2,1,1,1,na)
- disposal, building, cement (in concrete) and mortar, to final disposal [CH]: 11.2 kg; lognormal SD95 1.05
  (1,2,1,1,1,na)
- disposal, building, concrete, not reinforced, to final disposal [CH]: 13.1 kg; lognormal SD95 1.05
  (1,2,1,1,1,na)
- disposal, building, reinforced concrete, to final disposal [CH]: 166 kg; lognormal SD95 1.05
  (1,2,1,1,1,na)
- disposal, building, waste wood, untreated, to final disposal [CH]: 0.0381 kg; lognormal SD95 1.05
  (1,2,1,1,1,na)
- disposal, glass, 0% water, to municipal incineration [CH]: 13.7 kg; lognormal SD95 1.05
  (1,2,1,1,1,na)
- disposal, plastics, mixture, 15.3% water, to municipal incineration [CH]: 9.12 kg; lognormal SD95 1.05
  (1,2,1,1,1,na)
- sawn timber, softwood, planed, air dried, at plant [RER]: 7.62e-5 m3; lognormal SD95 1.05
  (1,2,1,1,1,na)

## Inputs from nature
- Occupation, construction site [resource, land]: 0.338 m2a; lognormal SD95 1.5
  (1,2,1,1,1,na)
- Occupation, urban, discontinuously built [resource, land]: 16.9 m2a; lognormal SD95 1.5
  (1,2,1,1,1,na)
- Transformation, from pasture and meadow [resource, land]: 0.675 m2; lognormal SD95 2
  (1,2,1,1,1,na)
- Transformation, to urban, discontinuously built [resource, land]: 0.675 m2; lognormal SD95 2
  (1,2,1,1,1,na)

## Emissions to nature
- Heat, waste [air, low population density]: 1.66 MJ; lognormal SD95 1.05
  (1,2,1,1,1,na)

## Sampling procedure
The inventory is calculated based on a solid database of agricultural buildings.

## Sources
- Nemecek, T., Heil A., Huguenin, O., Meier, S., Erzinger S., Blaser S., Dux. D., Zimmermann A.,, 2003, Life Cycle Inventories of Agricultural Production Systems, Final report ecoinvent 2000, 15, Swiss Centre for LCI, FAL & FAT, Dübendorf, CH

## Validation
Passed.
